// COMSOL Multiphysics 5.4.0.246 model "winding.mph"
// Outline of the model tree

Parameters
  I_winding = 1
  N_winding = 1
  sigma_winding = 4e7

Variables
  var1 "var"
    A_winding = int_winding_area(1)/2
    V_winding = 4*int_winding(1)
    J_square = 4*int_winding(mf.normJ^2)
    H_square = 4*int_winding(mf.normH^2)
    W_tot = 4*int_all(0.5*mf.normH*mf.normB)

Couplings
  intop1: Integration "int_winding_area" on boundaries 5, 11 | opname = int_winding_area
  intop2: Integration "int_winding" on domains 2 | opname = int_winding
  intop3: Integration "int_all" on domains 1, 2 | opname = int_all

Geometry
  geom1 "geom" (3D, length unit m)
    tor1: Torus "winding" | rmaj = 30e-3; rmin = 5e-3; angle = 90
    blk1: Block "air" | pos = {50e-3, 50e-3, 0}; base = center; size = {100e-3, 100e-3, 100e-3}
    fin: Finalize "union"

Materials
  mat1: Common "air" on domains 1
    def "Basic"
      relpermeability = 1
      electricconductivity = 0
      relpermittivity = 1
  mat2: Common "winding" on domains 2
    def "Basic"
      relpermeability = 1
      relpermittivity = 1
      electricconductivity = sigma_winding

Physics
  mf: InductionCurrents on all domains
    dependent variable A = {Ax, Ay, Az}
    al1: AmperesLaw "ampere" (default)
    mi1: MagneticInsulation "insulation" (default)
    init1: init "initial" (default)
    coil1: Coil "winding" on domains 2
      ConductorModel = Multi
      CoilType = Numeric
      CoilName = winding
      ICoil = I_winding
      N = N_winding
      sigmaCoil = sigma_winding
      coilWindArea = A_winding
      ccc1: CoilCurrentCalculation "geometry" (default)
        ct1: CoilTerminal "input" on boundaries 5
        cg1: CoilGround "output" on boundaries 11

Mesh
  mesh1 "mesh"
    size: MeshSizeDefault | hmax = 0.01; hmin = 0.0018; hcurve = 0.6; hnarrow = 0.5; hgrad = 1.5
    ftet1: FreeTet "tetrahedral" on remaining entities

Studies
  std1 "study"
    ccc: CoilCurrentCalculation "geometry"
    stat: Stationary

Solver configurations
  sol1 "sol" (study std1)
    v1: Variables "Dependent Variables 1"
    s1: Stationary "Stationary Solver 1"
      dDef: Direct
      se1: Segregated | segterm = itertol; segiter = 6
        ss1: SegregatedStep | segvar = {comp1_mf_coil1_ccc1_s}; linsolver = dDef
        ss2: SegregatedStep | segvar = {comp1_mf_coil1_ccc1_p, comp1_mf_coil1_ccc1_lm}; linsolver = dDef
    su1: StoreSolution
    v2: Variables "Dependent Variables 2" | initmethod = sol; notsolmethod = sol
    s2: Stationary "Stationary Solver 2"
      fc1: FullyCoupled | linsolver = i1
      i1: Iterative | linsolver = fgmres; nlinnormuse = on
        mg1: Multigrid
  sol2 "Solution Store 1" (study std1)

Datasets
  dset1: Solution "sol" | solution = sol1
  dset2: Solution "sol_tmp" | solution = sol2

Derived values
  gev1: EvalGlobal "integral"
    data = dset1
    table = tbl1
    expr = {A_coil, V_coil, J_square, H_square, W_tot}
    unit = {m^2, m^3, A^2/m, m*A^2, J}

Tables
  tbl1: Table
    // integral (J_square, H_square)
    J_square (A^2/m) | H_square (m*A^2)
    1000.17 | 0.0136235

Plots
  pg1: PlotGroup3D "magnetic_field" | data = dset1
    mslc1: Multislice | expr = mf.normH; unit = A/mm
  pg2: PlotGroup3D "current_density" | data = dset1
    mslc1: Multislice | expr = mf.normJ; unit = A/mm^2